**************** UNITS: SI ****************
**
** Length: m
** Time: s
** Force: N
** Stress: Pa
** Mass: kg = (N*s^2)/m
** Density: kg/m^3
** Temperature: K
** Energy: J (or N*m)
** Amount of substance: mol
** Concentration: mol/m^3
**
************************************************
*Heading
** Job name: subroutine_multiphysics Model name: subroutine_multiphysics
** Generated by: Abaqus/CAE 2023.HF4
*Preprint, echo=NO, model=NO, history=NO, contact=NO
**
** PARTS
**
*Part, name=cube
**
*INCLUDE, INPUT="processing_input/nodes.inc"
**
*************************************************
*User element, nodes=8, type=U1, properties=264, coordinates=3, variables=560
1, 2, 3
1, 11
1, 12
1, 13
*************************************************
**
*INCLUDE, INPUT="processing_input/elements_UEL.inc"
**
**
*INCLUDE, INPUT="processing_input/elements_VISUAL.inc"
**
*******************************************************
*UEL PROPERTY, ELSET=SOLID
**
** =====================
**
** FIELD INFO PROPERTIES
**
** mech_field (1 - ON, 0 - OFF), temp_field (1 - ON, 0 - OFF), hydro_field (1 - ON, 0 - OFF), damage_field (1 - ON, 0 - OFF)
** none, none, none, none
1, 1, 1, 1, 0, 0, 0, 0
**
** =====================
**
** MECHANICAL PROPERTIES
**
** UMAT_model (1 - elastic, 2 - isotropic vM, 3 - enHill48), Young's modulus - E (Pa), Poisson ratio - nu (dimless), none
** none, none, none, none
1, 210.0e+9, 0.3e0, 0.0, 0.0, 0.0, 0.0, 0.0
**
** =====================
**
** FLOW CURVE PROPERTIES
**
** True stress (Pa) - PEEQ (dimless) value pairs
869678161.0449681, 0.00e+00, 871526750.9057986, 2.00e-04, 873375340.766629, 4.00e-04, 875223930.6274595, 6.00e-04
877072520.48829, 8.00e-04, 878921110.3491204, 1.00e-03, 888164059.6532726, 2.00e-03, 897407008.9574249, 3.00e-03
906649958.2615771, 4.00e-03, 915892907.5657294, 5.00e-03, 925135856.8698816, 6.00e-03, 934378806.1740339, 7.00e-03
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**
** ======================
**
** PHASE FIELD PROPERTIES
**
** Length scale - length_scale (m), Critical energy release rate without hydrogen - Gc0 (N*m/m^2), Well-conditioning parameter - xkap (dimless), Fitting slope to DFT data X - chi_DFT (dimless)
** Gibbs free energy difference between the decohering interface and the surrounding material - delta_g_b0 (N*m/mol), none, none, none
1.0e-3, 405.0e3, 1.0e-7, 0.89e0, 30000.0e0, 0.0, 0.0, 0.0
**
*******************************************************
*Nset, nset=whole_cube, generate
1,  8,  1
*Elset, elset=whole_cube
1,
** Section: Section-1
*Solid Section, elset=VISUAL, material=multiphysics
,
*End Part
**
**
** ASSEMBLY
**
*Assembly, name=Assembly
**
*Instance, name=cube_assembly, part=cube
-0.0005,      -0.0005,      -0.0005
*End Instance
**
*Elset, elset=ALLE, instance=cube_assembly
1,
*Nset, nset=ALLN, instance=cube_assembly, generate
1,  8,  1
*Nset, nset=bottom_side, instance=cube_assembly, generate
2,  8,  2
*Elset, elset=bottom_side, instance=cube_assembly
1,
*Nset, nset=top_side, instance=cube_assembly, generate
1,  7,  2
*Elset, elset=top_side, instance=cube_assembly
1,
*Nset, nset=xsymm_side, instance=cube_assembly, generate
5,  8,  1
*Elset, elset=xsymm_side, instance=cube_assembly
1,
*Nset, nset=ysymm_side, instance=cube_assembly, generate
2,  8,  2
*Elset, elset=ysymm_side, instance=cube_assembly
1,
*Nset, nset=zsymm_side, instance=cube_assembly
3, 4, 7, 8
*Elset, elset=zsymm_side, instance=cube_assembly
1,
*End Assembly
*Amplitude, name=constant
0.,              1.,            100.,              1.
*Amplitude, name=loading
0.,              0.,            100.,              1.
**
** MATERIALS
**
*Material, name=multiphysics
*Density
7900.,
*Depvar
  46,
1, #25_eqplas, #25_eqplas
2, #26_eqplas_grad_X, #26_eqplas_grad_X
3, #27_eqplas_grad_Y, #27_eqplas_grad_Y
4, #28_eqplas_grad_Z, #28_eqplas_grad_Z
5, #29_deqplas, #29_deqplas
6, #30_sig_H, #30_sig_H
7, #31_sig_H_grad_X, #31_sig_H_grad_X
8, #32_sig_H_grad_Y, #32_sig_H_grad_Y
9, #33_sig_H_grad_Z, #33_sig_H_grad_Z
10, #34_sig_vonMises, #34_sig_vonMises
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46, #70_Gc, #70_Gc
*User Material, constants=1, type=THERMAL
0.,
*User Material, constants=1, type=MECHANICAL
0.,
**
** PHYSICAL CONSTANTS
**
*Physical Constants, absolute zero=0.
**
** PREDEFINED FIELDS
**
** Name: heat_bottom_side   Type: Temperature
*Initial Conditions, type=TEMPERATURE
bottom_side, 0.
** Name: heat_top_side   Type: Temperature
*Initial Conditions, type=TEMPERATURE
top_side, 100.
** ----------------------------------------------------------------
**
** STEP: step1_multiphysics
**
*Step, name=step1_multiphysics, nlgeom=YES, inc=100000
*Coupled Temperature-displacement, creep=none, deltmx=10000.
1., 100., 0.001, 1.
*SOLVER CONTROLS
 ,  ,  ,
*CONTROLS, PARAMETERS=FIELD, FIELD=DISPLACEMENT
 ,  ,  ,  ,  ,  ,  ,  ,
 ,  ,  ,
*CONTROLS, PARAMETERS=FIELD, FIELD=TEMPERATURE
 ,  ,  ,  ,  ,  ,  ,  ,
 ,  ,  ,
*CONTROLS, PARAMETERS=CONSTRAINTS
 ,  ,  ,  ,  ,  ,  ,  ,
*CONTROLS, PARAMETERS=TIME INCREMENTATION
 ,  ,  ,  ,  ,  ,  ,  ,  ,  ,  ,  ,  ,
 ,  ,  ,  ,  ,  ,  ,  ,
 ,  ,  ,  ,  ,  ,  ,  ,
 ,
*CONTROLS, PARAMETERS=LINE SEARCH
 ,  ,  ,  ,  ,
**
** BOUNDARY CONDITIONS
**
** Name: heat_top_side Type: Temperature
*Boundary, amplitude=constant
top_side, 11, 11, 100.
** Name: mech_top_disp Type: Displacement/Rotation
*Boundary, amplitude=loading
top_side, 2, 2, 0.001
** Name: mech_xsymm Type: Displacement/Rotation
*Boundary
xsymm_side, 1, 1
** Name: mech_ysymm Type: Displacement/Rotation
*Boundary
ysymm_side, 2, 2
** Name: mech_zsymm Type: Displacement/Rotation
*Boundary
zsymm_side, 3, 3
**
** PREDEFINED FIELDS
**
** Name: UFIELD   Type: Field
*Field, variable=1, user
ALLN
**
** OUTPUT REQUESTS
**
*Restart, write, frequency=0
**
** FIELD OUTPUT: F-Output-1
**
*Output, field
*Node Output
RF,U,NT,RFL
*Element Output, directions=YES
SDV
*Output, history, frequency=0
*End Step
